Clear
Set DefaultBaseFrequency=60
Set DataPath=C:\Users\amy\projects\opendss\trab


Redirect ieee37.dss
Redirect pvsystem.dss

!Solve Loadmult=1
Set Loadmult=1

Set VoltageBases = "230,4.8,0.48"
CalcVoltageBases
BusCoords IEEE37_BusXY.csv

New LoadShape.dispatch_shape interval=1 npts=24 mult=(file=curva_bess.txt)
New XYCurve.Eff npts=4 xarray=[.1        .2        .4        1.0]  yarray=[.86        .9        .93        .97]
New Storage.storage phases=3 bus1=BESS_BUS kv=0.38 pf=1 kWrated=150 %reserve=20  // kv anterior kv=13.8 effcurve=Eff kWhrated=314 %stored=20 state=idling conn=delta dispmode=follow model=1 daily=dispatch_shape

new monitor.storage_stodist_potencia element=Storage terminal=1 mode=1
new monitor.storage_stodist_VI element=Storage terminal=1 mode=0
new monitor.storage_stodist_variables element=Storage terminal=1 mode=3

new monitor.line_stodist_potencia element=Line.L1 terminal=1 mode=1
new monitor.line_stodist_VI element=Line.L1 terminal=1 mode=0
new monitor.line_stodist_variables element=Line.L1 terminal=1 mode=3

Set DataPath=C:\Users\amy\projects\opendss\trab\resultados\pv_storage_distribuido

set mode=daily
set number=24
Set Stepsize=1h

set DemandInterval=true
set overloadreport=true
set voltexceptionreport=true
set DIVerbose=true
solve
closeDI

Export Voltages pv_storage_distribuido_voltages.csv
Export Overloads pv_storage_distribuido_overloads.csv
export monitors all
Export monitor storage_stodist_potencia
Export monitor storage_stodist_VI
Export monitor storage_stodist_variables


export monitor pv1_variables
export monitor pv2_variables
export monitor pv3_variables
export monitor pv4_variables
export monitor pv5_variables
export monitor pv6_variables
export monitor pv7_variables
export monitor pv8_variables


export monitor pv1_potencia
export monitor pv2_potencia
export monitor pv3_potencia
export monitor pv4_potencia
export monitor pv5_potencia
export monitor pv6_potencia
export monitor pv7_potencia
export monitor pv8_potencia
